U_load := 120  # Напряжение нагрузки [V]
t_chargeFreq100 := 0.009583
t_chargeFreq10 := 0.09583
i_load := 0.005  # Ток нагрузки [A]
t_dischargeFreq100 := 0.000417
t_dischargeFreq10 := 0.00417
U_supply := 5  # Напряжение питания бустерной схемы, [V]
T := t_chargeFreq100 + t_dischargeFreq100 = 0.01
# Диапазон частот генерируемых импульсов [Hz]
f_min := 10
f_max := 100
freq := 1/T = 100
# Длительность фазы заряда дросселя [S]
U_loadIdeal := U_supply*T/t_dischargeFreq100 = 119.904
t_chargeMax := 1/f_min = 0.1
t_chargeMin := 1/f_max = 0.01
P_load := i_load*U_load = 0.6
Given
L_max := U_supply*U_load*t_chargeMax/(2*P_load) = 50
# Максимальное значение индуктивности
23 == t1/t2
1/(t1 + t2) == 10
i_Lm...ax := U_load/U_supply*i_load = 0.12
0.009583
t_charge_min := 0.9/f_max = 0.009
Find(t1, t2) → [23/240; 1/240]
0.000417
t_charge_max := 0.9/f_min = 0.09
L_min := U_supply*t_charge_max/i_Lmax = 3.75  # error: This variable is undefined.  # Минимальное значение индуктивности
P_load := P_load/0.8 = 0.75  # Учет КПД бустер схемы
P_load/U_supply = 0.15  # Ток на дросселе
